*Heading
** Job name: DamJob Model name: Model-1
** Generated by: Abaqus/CAE Student Edition 2020
*Preprint, echo=NO, model=NO, history=NO, contact=NO
**
** PARTS
**
*Part, name=Part-1
*Node
      1,          10.,          45.
      2,           0.,          45.
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*Element, type=CPS3
  1, 108,  74,  71
  2,  96,   9,  69
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*Nset, nset=Set-1, generate
   1,  109,    1
*Elset, elset=Set-1, generate
   1,  174,    1
** Section: Section-1
*Solid Section, elset=Set-1, material=Concrete
1.,
*End Part
**
**
** ASSEMBLY
**
*Assembly, name=Assembly
**
*Instance, name=Part-1-1, part=Part-1
*End Instance
**
*Nset, nset=Set-1, instance=Part-1-1
  4,  5,  6, 23, 24, 25, 26, 27, 28
*Elset, elset=Set-1, instance=Part-1-1
  20,  23,  49,  79,  88,  90,  92, 100
*Nset, nset=Set-2, instance=Part-1-1
  4,  5,  6, 23, 24, 25, 26, 27, 28
*Elset, elset=Set-2, instance=Part-1-1
  20,  23,  49,  79,  88,  90,  92, 100
*Elset, elset=_Surf-1_S2, internal, instance=Part-1-1
 13, 41, 42, 43, 45, 46, 47, 51, 52, 53, 57
*Elset, elset=_Surf-1_S1, internal, instance=Part-1-1
 20,
*Surface, type=ELEMENT, name=Surf-1
_Surf-1_S2, S2
_Surf-1_S1, S1
*Elset, elset=_Surf-2_S2, internal, instance=Part-1-1
 13, 41, 42, 43, 45, 46, 47, 51, 52, 53, 57
*Elset, elset=_Surf-2_S1, internal, instance=Part-1-1
 20,
*Surface, type=ELEMENT, name=Surf-2
_Surf-2_S2, S2
_Surf-2_S1, S1
*Elset, elset=_Surf-3_S2, internal, instance=Part-1-1
 13, 41, 42, 43, 45, 46, 47, 51, 52, 53, 57
*Elset, elset=_Surf-3_S1, internal, instance=Part-1-1
 20,
*Surface, type=ELEMENT, name=Surf-3
_Surf-3_S2, S2
_Surf-3_S1, S1
*End Assembly
**
** MATERIALS
**
*Material, name=Concrete
*Density
2400.,
*Elastic
 2.4e+10, 0.2
** ----------------------------------------------------------------
**
** STEP: Dam
**
*Step, name=Dam, nlgeom=NO
*Static
1., 1., 1e-05, 1.
**
** BOUNDARY CONDITIONS
**
** Name: BC-1 Type: Displacement/Rotation
*Boundary
Set-2, 1, 1
Set-2, 2, 2
Set-2, 6, 6
**
** LOADS
**
** Name: Gravity   Type: Gravity
*Dload
, GRAV, 9.81, 0., -1.
** Name: SimplePressure   Type: Pressure
*Dsload
Surf-3, P, 1e+06
**
** OUTPUT REQUESTS
**
*Restart, write, frequency=0
**
** FIELD OUTPUT: F-Output-1
**
*Output, field, variable=PRESELECT
**
** HISTORY OUTPUT: H-Output-1
**
*Output, history, variable=PRESELECT
*End Step
